// SBML level 3 version 2
// Created with https://github.com/matthiaskoenig/sbmlutils.

model sorafenib_intestine(PODOSE_sor, POSTOMACH_sor, Ka_dis_sor, Mr_sor, Vext, Vgu, Vlumen, Vfeces, Vstomach, sor_stomach, sor_lumen, sor_ext, sor_feces, sg_lumen, sg_ext, sg_feces)
  // Model for sorafenib elimination in the small intestine
  // Model for sorafenib absorption from the small intestine
  // Model for enterohepatic uptake of sorafenib via OATP2B1 (SLCO2B1)
  // Terms of use
  // The content of this model has been carefully created in a manual research effort. This file has been created by Matthias König using sbmlutils. For questions contact koenigmx@hu-berlin.de. Copyright © 2023 Matthias König.
  // This work is licensed under a Creative Commons Attribution 4.0 International License.
  // Redistribution and use of any part of this model, with or without modification, are permitted provided that the following conditions are met:
  // Redistributions of this SBML file must retain the above copyright notice, this list of conditions and the following disclaimer.
  // Redistributions in a different form must reproduce the above copyright notice, this list of conditions and the following disclaimer in the documentation and/or other materials provided with the distribution.
  // This model is distributed in the hope that it will be useful, but WITHOUT ANY WARRANTY; without even the implied warranty of MERCHANTABILITY or FITNESS FOR A PARTICULAR PURPOSE.
  // model units - substance: mmole, time: min, volume: litre, area: m2, length: metre, extent: mmole

  // Compartments:
  compartment Vext = 1 litre; Vext is "plasma";  // SBO:0000290 ncit:C13356 BTO:0000131
  compartment Vgu = 1.2825 litre; Vgu is "intestine";  // SBO:0000290 FMA:45615 BTO:0000545 ncit:C12736
  compartment Vlumen = 1.15425 litre; Vlumen is "intestinal lumen (inner part of intestine)";  // SBO:0000290 FMA:14586 UBERON:0018543
  compartment Vfeces = 1 litre;  // SBO:0000290 FMA:64183 ncit:C13234 BTO:0000440
  compartment Vstomach = 1 litre;  // SBO:0000290 FMA:7148 ncit:C12391 UBERON:0000945
  compartment Ventero = NaN; Ventero has litre; Ventero is "intestinal lining (enterocytes)";  // SBO:0000290
  // Membrane with microvilli towards the lumen.
  compartment Vapical = NaN; Vapical has m2; Vapical is "apical membrane (intestinal membrane enterocytes)";  // 2-D; SBO:0000290 FMA:84666 GO:0016324
  // Membrane towards the capillaries (blood).
  compartment Vbaso = NaN; Vbaso has m2; Vbaso is "basolateral membrane (intestinal membrane enterocytes)";  // 2-D; SBO:0000290 FMA:84669 GO:0016323

  // Species:
  substanceOnly species sor_stomach in Vstomach = 0; sor_stomach is "sorafenib (stomach)";  // SBO:0000247 pubchem.compound:216239 CHEBI:50924 ncit:C61948
  species sor_lumen in Vlumen = 0; sor_lumen is "sorafenib (intestinal volume)";  // SBO:0000247 pubchem.compound:216239 CHEBI:50924 ncit:C61948
  species sor_ext in Vext = 0; sor_ext is "sorafenib (plasma)";  // SBO:0000247 pubchem.compound:216239 CHEBI:50924 ncit:C61948
  substanceOnly species sor_feces in Vfeces = 0; sor_feces is "sorafenib (feces)";  // SBO:0000247 pubchem.compound:216239 CHEBI:50924 ncit:C61948
  species sg_lumen in Vlumen = 0; sg_lumen is "sorafenib N-oxide glucuronide (intestinal volume)";  // SBO:0000247 pubchem.compound:165361833 inchikey:ONDBFWZNGAQLQN-QMDPOKHVSA-N
  species sg_ext in Vext = 0; sg_ext is "sorafenib N-oxide glucuronide (plasma)";  // SBO:0000247 pubchem.compound:165361833 inchikey:ONDBFWZNGAQLQN-QMDPOKHVSA-N
  substanceOnly species sg_feces in Vfeces = 0; sg_feces is "sorafenib N-oxide glucuronide (feces)";  // SBO:0000247 pubchem.compound:165361833 inchikey:ONDBFWZNGAQLQN-QMDPOKHVSA-N

  // Parameters:
  // Fraction absorbed, i.e., only a fraction of the sorafenib in the intestinal lumen is absorbed. This parameter determines how much of the sorafenib is excreted in every round of the enterohepatic circulation.
  // Also, this parameter is dependent on OATP2B1 function, taking into consideration there may be SNPs hindering/enhancing the enzyme's function in the active process of the uptake of sorafenib . If OATP2B1 function is hindered, there would be more sorafenib excreted into faeces than absorbed and vice versa. (added: 16.03.2022)
  // F_sor_abs of dose is absorbed. (1-F_sor_abs) is excreted in feces.
  F_sor_abs = 0.5 dimensionless; F_sor_abs is "fraction absorbed sorafenib";  // SBO:0000002
  SORABS_Vmax = 0.02 per_min; SORABS_Vmax is "Vmax for sorafenib absorption";  // SBO:0000186
  PODOSE_sor = 0 mg; PODOSE_sor is "oral dose sorafenib [mg]";  // SBO:0000002
  POSTOMACH_sor = 0 mg; POSTOMACH_sor is "oral dose in stomach sor [mg]";  // SBO:0000002
  // Fast application to shift applied dose in the stomach.
  Ka_application_sor = 1000 per_hr; Ka_application_sor is "Ka [1/hr] application sor";  // SBO:0000002
  Ka_dis_sor = 2 per_hr; Ka_dis_sor is "Ka_dis [1/hr] dissolution sorafenib";  // SBO:0000002
  Mr_sor = 464.826 g_per_mole; Mr_sor is "Molecular weight sorafenib [g/mole]";  // SBO:0000647
  // parameter controls genetic variants (1.0 reference function, < 1.0 reduced function, > 1.0 increased function)
  f_OATP2B1 = 1 dimensionless; f_OATP2B1 is "parameter for OATP2B1 activity";  // SBO:0000002
  absorption_sor has mmole_per_min; absorption_sor is "absorption SOR";
  absorption_sg has mmole_per_min; absorption_sg is "absorption SG";

  // Assignment rules:
  absorption_sor := SORABS_Vmax*Vgu*sor_lumen;
  // Assumption: identical Vmax for SG as for SOR.
  absorption_sg := SORABS_Vmax*Vgu*sg_lumen;

  // Rate rules:
  PODOSE_sor' = -application_sor*Mr_sor;
  POSTOMACH_sor' = (application_sor - dissolution_sor)*Mr_sor;

  // Reactions:
  // Import via OATP2B1 is irreversible at apical membrane of enterocytes.
  SORABS: sor_lumen => sor_ext; F_sor_abs*absorption_sor*f_OATP2B1; SORABS is "absorption sorafenib (OATP2B1)";  // SBO:0000655
  SOREXC: sor_lumen => sor_feces; (1 - F_sor_abs)*absorption_sor; SOREXC is "excretion sorafenib (feces)";  // SBO:0000655
  // Assumption: same fraction absorbed for SG as SOR to reduce parameters
  SGABS: sg_lumen => sg_ext; F_sor_abs*absorption_sg; SGABS is "absorption SG";  // SBO:0000655
  // Assumption: same fraction absorbed for SG as SOR to reduce parameters
  SGEXC: sg_lumen => sg_feces; (1 - F_sor_abs)*absorption_sg; SGEXC is "excretion SG (feces)";  // SBO:0000655
  application_sor: => sor_stomach; Ka_application_sor/(60 min_per_hr)*PODOSE_sor/Mr_sor; application_sor is "application sorafenib";
  dissolution_sor: sor_stomach => sor_lumen; Ka_dis_sor/(60 min_per_hr)*POSTOMACH_sor/Mr_sor; dissolution_sor is "dissolution sorafenib";

  // Unit definitions:
  unit g_per_mole = gram / mole; g_per_mole is "g/mole";
  unit l_per_min = litre / (60 second); l_per_min is "l/min";
  unit l_per_min_mmole = litre / (60 second * 1e-3 mole); l_per_min_mmole is "l/min/mmole";
  unit m2 = metre^2; m2 is "meter^2";
  unit mM = 1e-3 mole / litre; mM is "mmole/liter";
  unit mg = 1e-3 gram;
  unit mg_per_min = 1e-3 gram / (60 second); mg_per_min is "mg/min";
  unit min = 60 second;
  unit min_per_hr = 60 second / (3600 second); min_per_hr is "min/hr";
  unit mmole = 1e-3 mole;
  unit mmole_per_min = 1e-3 mole / (60 second); mmole_per_min is "mmole/min";
  unit mmole_per_min_l = 1e-3 mole / (60 second * litre); mmole_per_min_l is "mmole/min/liter";
  unit per_hr = 1 / (3600 second); per_hr is "1/hr";
  unit per_min = 1 / (60 second); per_min is "1/min";
  unit per_min_l = 1 / (60 second * litre); per_min_l is "1/min/liter";
end
