// SBML level 3 version 2
// Created with https://github.com/matthiaskoenig/sbmlutils.

model sorafenib_liver(Vext, Vli, Vbi, Vlumen, sor_ext, m2_ext, sg_lumen)
  // Model for hepatic sorafenib metabolism.
  // Model for sorafenib metabolism. version 1
  // Changelog
  // version 1
  // initial model for demonstration
  // version 2
  // added conversion and export of sorafenib metabolites
  // Terms of use
  // The content of this model has been carefully created in a manual research effort. This file has been created by Matthias König using sbmlutils. For questions contact koenigmx@hu-berlin.de. Copyright © 2023 Matthias König.
  // This work is licensed under a Creative Commons Attribution 4.0 International License.
  // Redistribution and use of any part of this model, with or without modification, are permitted provided that the following conditions are met:
  // Redistributions of this SBML file must retain the above copyright notice, this list of conditions and the following disclaimer.
  // Redistributions in a different form must reproduce the above copyright notice, this list of conditions and the following disclaimer in the documentation and/or other materials provided with the distribution.
  // This model is distributed in the hope that it will be useful, but WITHOUT ANY WARRANTY; without even the implied warranty of MERCHANTABILITY or FITNESS FOR A PARTICULAR PURPOSE.
  // model units - substance: mmole, time: min, volume: litre, area: m2, length: metre, extent: mmole

  // Compartments:
  compartment Vext = 1.5 litre; Vext is "plasma";  // SBO:0000290 ncit:C13356 BTO:0000131
  compartment Vli = 1.5 litre; Vli is "liver";  // SBO:0000290 FMA:7197 BTO:0000759 ncit:C12392
  compartment Vbaso = NaN; Vbaso has m2; Vbaso is "basolateral membrane";  // SBO:0000290 FMA:84669 GO:0016323
  compartment Vapical = NaN; Vapical has m2; Vapical is "apical membrane";  // SBO:0000290 FMA:84666 GO:0016324
  compartment Vbi = 1 litre; Vbi is "bile";  // SBO:0000290 FMA:62971 ncit:C13192
  compartment Vlumen = 0.1 litre; Vlumen is "intestinal lumen";  // SBO:0000290 FMA:14586 UBERON:0018543

  // Species:
  species sor_ext in Vext = 0; sor_ext is "sorafenib(plasma)";  // SBO:0000247 pubchem.compound:216239 CHEBI:50924 ncit:C61948
  species m2_ext in Vext = 0; m2_ext is "sorafenib N-oxdide M2 (plasma)";  // SBO:0000247 pubchem.compound:98264729 inchikey:BQAZCCVUZDIZDC-UHFFFAOYSA-N
  species sor in Vli = 0; sor is "sorafenib (liver)";  // SBO:0000247 pubchem.compound:216239 CHEBI:50924 ncit:C61948
  species m2 in Vli = 0; m2 is "sorafenib N-oxdide M2 (liver)";  // SBO:0000247 pubchem.compound:98264729 inchikey:BQAZCCVUZDIZDC-UHFFFAOYSA-N
  species sg in Vli = 0; sg is "sorafenib N-oxdide glucuronide (liver)";  // SBO:0000247 pubchem.compound:165361833 inchikey:ONDBFWZNGAQLQN-QMDPOKHVSA-N
  // Bile SG in amount.
  substanceOnly species sg_bi in Vbi = 0; sg_bi is "sorafenib N-oxdide glucuronide (bile)";  // SBO:0000247 pubchem.compound:165361833 inchikey:ONDBFWZNGAQLQN-QMDPOKHVSA-N
  species sg_lumen in Vlumen = 0; sg_lumen is "sorafenib N-oxdide glucuronide (lumen)";  // SBO:0000247 pubchem.compound:165361833 inchikey:ONDBFWZNGAQLQN-QMDPOKHVSA-N

  // Parameters:
  SORIM_Vmax = 1 mmole_per_min_l; SORIM_Vmax is "Vmax sorafenib import";  // SBO:0000186
  SORIM_Km_sor = 0.1 mM; SORIM_Km_sor is "Km for sorafenib import";  // SBO:0000027
  SOR2M2_Vmax = 0.1 mmole_per_min_l; SOR2M2_Vmax is "Vmax sorafenib model conversion";  // SBO:0000186
  SOR2M2_Km_sor = 0.1 mM; SOR2M2_Km_sor is "Km sorafenib conversion";  // SBO:0000027
  M2EX_Vmax = 1 mmole_per_min_l; M2EX_Vmax is "Vmax sorafenib export";  // SBO:0000186
  M2EX_Km_m2 = 0.1 mM; M2EX_Km_m2 is "Km sorafenib export";  // SBO:0000027
  M2GLU_Vmax = 0.1 mmole_per_min_l; M2GLU_Vmax is "Vmax sorafenib model conversion";  // SBO:0000186
  M2GLU_Km_m2 = 0.1 mM; M2GLU_Km_m2 is "Km sorafenib conversion";  // SBO:0000027
  SGEX_Vmax = 1 mmole_per_min_l; SGEX_Vmax is "Vmax sg export to bile";  // SBO:0000186
  SGEX_Km_sg = 0.1 mM; SGEX_Km_sg is "Km sg export to bile";  // SBO:0000027

  // Reactions:
  SORIM: sor_ext -> sor; SORIM_Vmax/SORIM_Km_sor*Vli*(sor_ext - sor)/(1 + sor_ext/SORIM_Km_sor + sor/SORIM_Km_sor); SORIM is "sorafenib import OATP1B/OCT1 (SORIM)";  // SBO:0000655
  // phase I oxidation mediated by cytochrome P450 3A4 (CYP3A4) Catalyzed partially via oxidases.
  SOR2M2: sor => m2; SOR2M2_Vmax/SOR2M2_Km_sor*Vli*sor/(1 + sor/SOR2M2_Km_sor); SOR2M2 is "sorafenib oxdidation CYP3A4 (SOR2M2)";  // SBO:0000176
  M2EX: m2 -> m2_ext; M2EX_Vmax/M2EX_Km_m2*Vli*(m2 - m2_ext)/(1 + m2_ext/M2EX_Km_m2 + m2/M2EX_Km_m2); M2EX is "M2 export (M2EX)";  // SBO:0000655
  // phase II conjugation mediated by UDP glucuronosyltransferase 1A9 (UGT1A9)
  M2GLU: m2 => sg; M2GLU_Vmax*Vli*m2/(m2 + M2GLU_Km_m2); M2GLU is "M2 glucuronidation UGT1A9 (M2GLU)";  // SBO:0000176
  SGEX: sg => sg_bi; SGEX_Vmax*Vli*sg/(sg + SGEX_Km_sg); SGEX is "sg export ABCC2/ABCG2 (SGEX)";  // SBO:0000655
  // Transport of sg_bi via bile to the intestinal lumen. This is the enterohepatic circulation of sg-bi
  // Irreversible transport of sg_bi via Mass-Action-Kinetics,
  SGEHC: sg_bi => sg_lumen; SGEX; SGEHC is "sg enterohepatic circulation";  // SBO:0000655

  // Unit definitions:
  unit g_per_mole = gram / mole; g_per_mole is "g/mole";
  unit l_per_min = litre / (60 second); l_per_min is "l/min";
  unit l_per_min_mmole = litre / (60 second * 1e-3 mole); l_per_min_mmole is "l/min/mmole";
  unit m2 = metre^2; m2 is "meter^2";
  unit mM = 1e-3 mole / litre; mM is "mmole/liter";
  unit mg = 1e-3 gram;
  unit min = 60 second;
  unit mmole = 1e-3 mole;
  unit mmole_per_min = 1e-3 mole / (60 second); mmole_per_min is "mmole/min";
  unit mmole_per_min_l = 1e-3 mole / (60 second * litre); mmole_per_min_l is "mmole/min/liter";
  unit per_min = 1 / (60 second); per_min is "1/min";
  unit per_min_l = 1 / (60 second * litre); per_min_l is "1/min/liter";
end
